// COMSOL Multiphysics 6.3.0.420 model "Comsol_Graphen-SPR_without_run.mph"
// Outline of the model tree

Parameters
  lda0 = 633[nm]  // Wavelength
  n_prism = 1.5  // Prism RI
  n_Au_re = 0.19  // Au real(n) at 633 nm
  n_Au_im = 3.59  // Au imag(n) at 633 nm
  n_gr_re = 3  // gr real(n) at 633 nm
  n_gr_im = -1.4  // gr im(n) at 633 nm
  n = n_gr_re+i*n_gr_im
  t_prism = 1[um]  // Prism thickness
  t_Au = 50[nm]  // Au thickness
  t_gr = 0.34[nm]  // gr thickness
  n_sens = 1.33  // Sensing medium
  t_sens = 1.2[um]  // Sensing layer thickness (1-1.5 um)
  Lx = 3[um]  // Simulation width
  angle = 0[deg]  // Incident angle parameter
  k0 = 2*pi/lda0
  omega = c_const*k0
  epsr_gr = n^2  // Permitvity of gr
  sigma_s = i*omega*epsilon0_const*(epsr_gr-1)*t_gr

Geometry
  geom1 "Geometry 1" (2D, length unit µm)
    r1: Rectangle "Sensor" | size = {Lx, t_sens}
    r3: Rectangle "Au" | size = {Lx, t_Au}; pos = {0, t_sens}
    r4: Rectangle "Prism" | size = {Lx, t_prism}; pos = {0, t_sens+t_Au}
    fin: Finalize "Form Union"

Materials
  mat1: Common "Prism" on domains 3
    RefractiveIndex: RefractiveIndex
      n = n_prism
      ki = 0
  mat2: Common "Au" on domains 2
    RefractiveIndex: RefractiveIndex
      n = n_Au_re
      ki = n_Au_im
  mat4: Common "Sensor" on domains 1
    RefractiveIndex: RefractiveIndex
      n = n_sens
      ki = 0

Physics
  ewfd: ElectromagneticWavesFrequencyDomain on all domains
    dependent variable E = {Ex, Ey, Ez}
    MeshControl.ResolveWaveInLossyMedia = 1
    wee1: WaveEquationElectric (default)
    pec1: PerfectElectricConductor (default)
    init1: init "Initial Values 1" (default)
    port1: Port on boundaries 7 | InputType = H; Hampl = {0, 0, 1}; alpha_inc = angle; PortType = Periodic
    port2: Port on boundaries 2
      PortExcitation = off
      InputType = H
      Hampl = {0, 0, 1}
      alpha_inc = angle
      PortType = Periodic
    pc1: PeriodicCondition on boundaries 1, 3, 5, 8-10
      PeriodicType = Floquet
      Floquet_source = FromPeriodicPort
      destinationDomains: boundaries 8-10
    trans1: TransitionBoundaryCondition on boundaries 4
      DisplacementFieldModel = RefractiveIndex
      n_mat = userdef
      n = n
      ki_mat = userdef
      ki = 1
      epsilonr_mat = userdef
      epsilonr = epsr_MoS2
      d = t_gr
      noCoupling = 0
      murbnd_mat = userdef
      murbnd = 1

Mesh
  mesh1 "Mesh 1" (physics-controlled)
    size: MeshSizeDefault | hauto = 7

Studies
  std1 "Study 1"
    wave: Wavelength "Wavelength Domain" | plist = 0.633; ftplistmethod = manual; useparam = on

Solver configurations
  sol1 "Solution 1" (study std1)
    v1: Variables "Dependent Variables 1"
    s1: Stationary "Stationary Solver 1"
      p1: Parametric
      fc1: FullyCoupled
      d1: Direct "Suggested Direct Solver (ewfd)"

Datasets
  dset1: Solution on all domains | solution = sol1

Tables
  mm1: Table "Maximum and Minimum Values"
    // Max/min surface
    X | Y | Magnetic field, z-component (A/m)
    0.182243 | 1.2 | -316.879
    0.841121 | 1.2 | 316.883

Plots
  pg1: PlotGroup2D "Electric Field (ewfd)" | data = dset1
    surf1: Surface | data = dset1; expr = ewfd.Ey
    arwl1: ArrowLine | expr = {ewfd.kIncx_1, ewfd.kIncy_1}; arrowcount = 20
      sel1: Selection on boundaries 7
    arws1: ArrowSurface | expr = {ewfd.Ex, ewfd.Ey}; xnumber = 40; ynumber = 40
  pg2: PlotGroup1D "Reflectance, Transmittance, and Absorptance (ewfd)"
    data = dset1
    ylabel = Reflectance, transmittance, and absorptance (1)
    glob1: Global
      expr = {ewfd.Rorder_0, ewfd.Torder_0, ewfd.RTtotal, ewfd.Atotal}
      unit = {1, 1, 1, 1}
      descr = {"Reflectance, order 0", "Transmittance, order 0", Total reflectance and transmittance, SPP coupling (Absorptance)}
      xdata = expr
      xdataexpr = angle
  pg3: PlotGroup1D "Polarization Plot (ewfd)" | data = dset1; title = Polarization states, Color: Phase (Radians)
    plz1: Polarization | legends = Reflection
      col1: Color "Color Expression 1" | expr = phase
    plz2: Polarization | legends = Transmission
      col1: Color "Color Expression 1" | expr = phase
  pg4: PlotGroup2D "Instantaneous Electric Field Norm" | data = dset1
    surf1: Surface | data = dset1; expr = ewfd.normEi
    arws1: ArrowSurface | expr = {ewfd.Ex, ewfd.Ey}; xnumber = 30; ynumber = 30
  pg5: PlotGroup1D "Reflectance" | data = dset1; ylabel = Reflectance
    glob1: Global | expr = ewfd.RTtotal; unit = 1; descr = Total reflectance; xdata = expr; xdataexpr = angle

Exports
  data1: Data
    data = dset1
    expr = ewfd.normE
    unit = V/m
    descr = Electric field norm
    filename = /home/cmp/amirag/Documents/Amir Aghajani/Data/Sheet model/Fields_data_Enorm.txt
  plot1: Plot | filename = /home/cmp/aalin/Downloads/SPR_new.txt
  plot2: Plot | filename = /home/cmp/aalin/Downloads/field.txt; struct = sectionwise